<Lems xmlns="http://www.neuroml.org/lems/0.9.0">

	<Constant name="const0" value="-0.1" dimension="none" />

	<ComponentType name="DependsOn_dv0_p0">
		<Parameter name="p1" dimension="none" />
		<DerivedParameter name="dp1" dimension="none" value="p0 * p1" />

		<Requirement name="dv0" dimension="none" />
		<Requirement name="p0" dimension="none" />

		<Dynamics>
			<StateVariable name="x" exposure="x" />
			<StateVariable name="y" exposure="y" />
			<TimeDerivative variable="x" value="const0*dp1/p0/p1*x" />
			<TimeDerivative variable="y" value="-dv0 * y" />
		</Dynamics>

	</ComponentType>

	<ComponentType name="Exposes_dv0_p0">
		<Child name="child0" type="DependsOn_dv0_p0" />
		<Parameter name="p0" dimension="none" />
		<DerivedParameter name="dp1" dimension="none" value="p0 * p0 * dp0" />
		<DerivedParameter name="dp0" dimension="none" value="p0 * p0" />

		<Exposure name="dv0" dimension="none" />
		<Dynamics>
			<DerivedVariable name="dv0" value="1e1*const0" exposure="dv0" />
		</Dynamics>
	</ComponentType>

	<Component type="Exposes_dv0_p0" p0="2" id="comp0">
		<Component type="DependsOn_dv0_p0" p1="10" id="comp1" />
	</Component>

</Lems>
